finish,
/clear,start

/inp,parameters,inp

/filn,%dbname%,1
/out,,prot

/inp,buttons/buttons,inp
/inp,geo,inp

! linear static analysis
/solu
anty,static
pstres,on

! apply force on top
nsel,,loc,z,ll-1,ll+1
*get,num_node,node,,count
f,all,fz,-force_load/num_node

alls
solve

! post processing
/post1
set,last
prrs
plns,u,sum
/ang,1
/auto,1
/view,1,1,1,1
/rep
/ui,copy,save,emf,graph,color,reverse,no,100

! linear buckling analysis
fini
/solu
antype,buckl
bucopt,lanb,10
mxpand,all

alls
solve

! post processing
/post1
set,first
plns,u,sum
/ang,1
/auto,1
/view,1,1,1,1
/rep
/ui,copy,save,emf,graph,color,reverse,no,100
